// SBML level 3 version 1

model __main()

  // Compartments:
  compartment default_compartment = 1;

  // Species:
  species EGF in default_compartment = 100;
  species Raf in default_compartment = 1;
  species pRaf in default_compartment = 0;
  species Mek in default_compartment = 1;
  species pMek in default_compartment = 0;
  species Erk in default_compartment = 1;
  species pErk in default_compartment = 0;

  // Parameters:
  r0 = 1;
  r_0 = 1;
  r1 = 1;
  r_1 = -0.1;
  r2 = 0.34;
  r_2 = -0.35;
  r3 = 0.09;
  r_3 = -0.53;
  d = 1;
  sigma = 1;

  // Reactions:
  R1: EGF + Raf -> pRaf; r0*EGF*Raf;
  R2: pRaf -> EGF + Raf; r_0*pRaf;
  R3: pRaf + Mek -> pMek; r1*pRaf*Mek;
  R4: pMek -> pRaf + Mek; r_1*pMek*pRaf;
  R5: pMek + Erk -> pErk; r2*pMek*Erk;
  R6: pErk -> pMek + Erk; r_2*pErk*pMek;
  R7: pRaf + Erk -> pErk; r3*pRaf*Erk;
  R8: pErk -> pRaf + Erk; r_3*pErk*pRaf;
  R9: pErk -> ; d*pErk;
end
