// SBML level 3 version 1

model __main()

  // Compartments:
  compartment default_compartment = 1;

  // Species:
  species NGF in default_compartment = 50;
  species Raf in default_compartment = 1;
  species pRaf in default_compartment = 0;
  species Mek in default_compartment = 1;
  species pMek in default_compartment = 0;
  species Erk in default_compartment = 1;
  species pErk in default_compartment = 0;

  // Parameters:
  r0 = 1;
  r1 = 6.18;
  r_1 = -0.17;
  r2 = 0.63;
  r_2 = -3.73;
  r3 = 0.96;
  r_3 = 0.4;
  r4 = 1;
  sigma = 1;

  // Reactions:
  R1: NGF + Raf -> pRaf; r0*NGF*Raf;
  R2: pRaf + Mek -> pMek; r1*pRaf*Mek;
  R3: pMek + pRaf -> Raf; r_1*pMek*pRaf;
  R4: pMek + Erk -> pErk; r2*pMek*Erk;
  R5: pErk + pMek -> Mek; r_2*pErk*pMek;
  R6: pRaf + Erk -> pErk; r3*pRaf*Erk;
  R7: pErk + pRaf -> Raf; r_3*pErk*pRaf;
  R8: pErk -> Erk; r4*pErk;
end
