// SBML level 3 version 1

model __main()

  // Compartments:
  compartment default_compartment = 1;

  // Species:
  species NGF in default_compartment = 50;
  species Raf in default_compartment = 0;
  species Mek in default_compartment = 0;
  species Erk in default_compartment = 0;

  // Parameters:
  r0 = 1;
  r1 = 6.18;
  r_1 = -0.17;
  r2 = 0.63;
  r_2 = -3.73;
  r3 = 0.96;
  r_3 = 0.4;
  d = 1;
  sigma = 1;

  // Reactions:
  R1: NGF -> Raf; r0*NGF;
  R2: Raf -> Mek; r1*Raf;
  R3: Mek -> Raf; r_1*Mek;
  R4: Mek -> Erk; r2*Mek;
  R5: Erk -> Mek; r_2*Erk;
  R6: Raf -> Erk; r3*Raf;
  R7: Erk -> Raf; r_3*Erk;
  R8: Erk -> ; d*Erk;
end
