// SBML level 3 version 1

model __main()

  // Compartments:
  compartment default_compartment = 1;

  // Species:
  species EGF_stimuli in default_compartment = 100;
  species Raf_kinase in default_compartment = 0;
  species Mek_kinase in default_compartment = 0;
  species Erk_kinase in default_compartment = 0;

  // Parameters:
  r0 = 1;
  r1 = 10;
  r_1 = 4;
  r2 = 2;
  r_2 = 3;
  r3 = 9;
  r_3 = 3;
  d = 1;

  // Reactions:
  J0: EGF_stimuli -> Raf_kinase; r0*EGF_stimuli;
  J1: Raf_kinase -> Mek_kinase; r1*Raf_kinase;
  J2: Mek_kinase -> Raf_kinase; r_1*Mek_kinase;
  J3: Mek_kinase -> Erk_kinase; r2*Mek_kinase;
  J4: Erk_kinase -> Mek_kinase; r_2*Erk_kinase;
  J5: Raf_kinase -> Erk_kinase; r3*Raf_kinase;
  J6: Erk_kinase -> Raf_kinase; r_3*Erk_kinase;
  J7: Erk_kinase -> ; d*Erk_kinase;
end
